# Решение дифференциального уравнения методом Рунге-Кутта
y[0] := 1
h := 0.1
a := 0
b := 1
h := 0.1
y[0] := 1
i := 0, 1 .. 10
x[i] := i*h
zz(x, y) := 2*(x^2 + y)
f := 2*(x^2 + y[0])
n := (b - a)/h = 10
k1 := 2*(x[0]^2 + y[0]) = 2
func(x) :=
    n ← x
    AA ← AA[:, n]
    for i ∈ 0 .. x
        AA[i] ← zz(i, 1)
    return AA
kk1 := zz(x[i], y[i])  # error: This value must be an integer.
k2 := 2*((x[0] + h/2)^2 + (y[0] + h*k1/2)) = 2.205
kk2 := zz(x[i] + h/2, y[i] + h*kk1/2)
k3 := 2*((x[0] + h/2)^2 + (y[0] + h*k2/2)) = 2.2255
kk3 := zz(x[i] + h/2, y[i] + h*kk2/2)
k4 := 2*((x[0] + h)^2 + (y[0] + h*k3)) = 2.4651
kk4 := zz(x[i] + h, y[i] + h*kk3)
y1 := y[0] + h/6*(k1 + 2*k2 + 2*k3 + k4) = 1.2221
deltY[1] := y[i] + h/6*(k1 + 2*k2 + 2*k3 + k4)  # error: This value must be an integer.
i := 1
kk11 := zz(x[i], y[i])  # error: This array index is invalid for this array.
func(10) → [2; 4; 10; 20; 34; 52; 74; 100; 130; 164; 202]
kk2 := zz(x[i] + h/2, y[i] + h*kk1/2)
kk3 := zz(x[i] + h/2, y[i] + h*kk2/2)
kk4 := zz(x[i] + h, y[i] + h*kk3)
deltY[2] := deltY[1] + h/6*(k1 + 2*k2 + 2*k3 + k4)  # error: This array index is invalid for this array.
methodRungeKutt(func, startVal, a, b, h) :=
    n ← (b - a)/h
    AA ← AA[:, n]
    delY[0] ← startVal
    for ii ∈ 0 .. n
        x[i] ← i*h
        kk1 ← func(x[i], y[i])
        kk2 ← func(x[i] + h/2, y[i] + h*kk1/2)
        kk3 ← func(x[i] + h/2, y[i] + h*kk2/2)
        kk4 ← func(x[i] + h, y[i] + h*kk3)
        delY[i + 1] ← delY[i] + h/6*(k1 + 2*k2 + 2*k3 + k4)
        AA[i] ← delY[i + 1]
        delY[i] ← AA[i]
    return AA
zat(x, y) := 2*(x^2 + y)
methodRungeKutt(zat, 1, 0, 1, 0.1)  # error: This array index is invalid for this array.
